// COMSOL Multiphysics 5.3.0.260 model "bent_1um_grid_onrowland.mph"
// New formulation
// Outline of the model tree

Parameters
  width = 400[um]  // Width of the integration area
  height = 100[µm]  // Height of the integration area
  theta = thetab+scan  // Angle of incidence
  theta2 = thetab+scan  // Angle of outgoing radiation
  E0 = 8[keV]  // Energy of an incident photon
  chi0 = -1.539e-5+i*3.537e-07
  chih = -6.045e-6-i*5.694e-06
  chib = -5.694e-06+i*6.045e-06
  hc = 1.23984193 [eV*µm]
  lambda = hc/E0  // Wavelength of radiation
  k = 2*pi/lambda  // Wavenumber of incident radiation
  thetab = asin(lambda/(2*dhkl))  // Bragg angle
  d100 = 5.4307E-10 [m]  // Silicon lattice parameter
  dhkl = d100/sqrt(1^2+1^2+1^2)
  scan_arcsec = 1000
  FWHM = 2*sqrt(abs(chih*chib))/sin(2*thetab)*180/pi*3600  // Darwin width in arcsec
  FWHM_max = sqrt(2*sqrt(abs(chih*chib)))*180/pi*3600  // Darwin width near backscattering
  thb_deg = thetab*180/pi
  G = 2*pi/dhkl  // Reciprocal lattice vector length
  Lambda_B = lambda*sin(thetab)/(pi*sqrt(abs(chih*chib)))  // Extinction length (Bragg)
  a_0 = lambda/(2*pi*abs(imag(chi0)))  // Absorption length
  scan = (scan_arcsec/3600)[deg]
  w = 100[um]
  costh = cos(theta)
  sinth = sin(theta)
  FWHM_window = 100[um]
  window_sigma = FWHM_window/2.355

Variables
  var1 "Variables 1"
    C1 = cos(theta)
    C2 = cos(theta2)
    S1 = sin(theta)
    S2 = sin(theta2)
    beta = -deltath*sin(2*thetab)-chi0/2-dGu_dsg/k
    deltath = theta-thetab
    dGu_dsg = G*(C2*duz_dx+S2*duz_dz)
    s0 = (x*S2-y*C2)/(C1*S2+C2*S1)
    sh = (x*S1+y*C1)/(C2*S1+S2*C1)
    A2 = i*0.5*k*chib
    B1 = i*0.5*k*chih
    B2 = i*dGu_dsg
  var2 "Deformation"
    ux = ux_cylindrical
    uz = uz_cylindrical
    ux_cylindrical = -X*(Y+height/2)/R
    uz_cylindrical = (X^2+nu*(Y+height/2)^2)/(2*R)
    R = 5[m]  // Bending radius
    nu = 0.27  // Poisson's ratio
    duz_dx = X/R
    duz_dz = nu*(Y+height/2)/R
  var3 "Source"
    source = s_cyl*incident_phase
    s_plane = window2
    s_spherical = exp(i*k*(sph_phase-surf_phase-d))*window2
    d = R*S1  // Distance to the source on the Rowland circle
    sph_phase = sqrt(x^2+y^2+d^2+2*d*(x*C1-y*S1))
    surf_phase = x*C1-y*S1
    window = exp(-eta^2/w^2)
    s_cyl = exp(i*k*eta^2/(2*d))*window2
    eta = x*S1+y*C1
    incident_phase = exp(-i*0.5*k*chi0*s0-i*k*(deltath*sin(2*thetab)+chi0/2)*sh)
    window2 = exp(-(x+125[um])^2/(2*window_sigma^2))

Couplings
  intop1: Integration on boundaries 3

Geometry
  geom1 "Geometry 1" (2D, length unit µm)
    r1: Rectangle | pos = {-width/2, -height}; size = {width, height}
    fin: Finalize "Form Union"

Physics
  ale: MovingMesh on all domains
    fix1: FixedMesh (default)
    disp1: PrescribedMeshDisplacement (default) | useDx = {0, 0}
    pres1: PrescribedDeformation on domains 1 | dx = {ux, uz}
  w: WeakFormPDE on all domains
    dependent variable u = {u1, u2}
    wfeq1: WeakFormPDE "Weak form TT-equations" (default)
      weak = {(test(u1x)*C1-test(u1y)*S1)*u1+A2*u2*test(u1), (test(u2x)*C2+test(u2y)*S2)*u2+(B1*u1+B2*u2)*test(u2)}
    zflx1: ZeroFluxBoundary "Zero Flux 1" (default)
    init1: init "Initial Values 1" (default) | u1 = source
    dir2: DirichletBoundary "Diffracted Wave at the Bottom" on boundaries 2 | r = {0, 0}; useDirichletCondition = {0, 1}
    dir1: DirichletBoundary "Incident Wave at the Top" on boundaries 3
      r = {source, exp(-(x/x0)^4)*exp(i*phase1)}
      useDirichletCondition = {1, 0}
    dir3: DirichletBoundary "Waves at the Left" on boundaries 1 | r = {0, 0}
    weak9: WeakContribution on all boundaries
      integrationOrder = 4
      quadratureFrame = spatial
      weakExpression = - test(u1)*(u1*C1*nx-u1*S1*ny)
      automaticQuadrature = 1
    weak10: WeakContribution on boundaries 1-4
      integrationOrder = 4
      quadratureFrame = spatial
      weakExpression = - test(u2)*(u2*C2*nx+u2*S2*ny)
      automaticQuadrature = 1

Mesh
  mesh1 "Mesh 1"
    size: MeshSizeDefault | hmin = 0.0010; hauto = 1; custom = on; hmax = 1
    ftri1: FreeTri "Free Triangular 1" on remaining entities
    dis2: Distribution (disabled) on boundaries 2, 3 | type = explicit
    map1: Map "Mapped 1" (disabled) on remaining entities | adjustedgdistr = on
    bl1: BndLayer "Boundary Layers 1" (disabled) on entire geometry
      blp: BndLayerProp "Boundary Layer Properties" on boundaries 3

Studies
  std2 "Compute rocking curve"
    param: Parametric "Parametric Sweep" | pname = scan_arcsec; plistarr = range(-5,25/29,20)
    stat: Stationary | physselection = w

Solver configurations
  sol3 "Solver 3" (study std2)
    v1: Variables "Dependent Variables 1"
    s1: Stationary "Stationary Solver 1"
      dDef: Direct | ooc = on; oocmemory = 2048
      fc1: FullyCoupled | linsolver = dDef
  sol4 "Parametric 4" (study std2)

Datasets
  edg1: Edge2D "Top Surface" on boundaries 3 | data = dset4
  dset3: Solution | solution = sol3
  dset4: Solution | solution = sol4

Derived values
  int2: IntLine "Reflected intensity" on boundaries 3
    data = dset4
    table = tbl1
    expr = abs(u2*exp(i*0.5*k*chi0*s0+i*k*(deltath*sin(2*thetab)+chi0/2)*sh))^2/width
    unit = 1
  int3: IntLine "Incident intensity" on boundaries 3
    data = dset4
    table = tbl1
    expr = abs(u1*exp(i*0.5*k*chi0*s0+i*k*(deltath*sin(2*thetab)+chi0/2)*sh))^2/width
    unit = 1

Tables
  tbl1: Table
    // Reflected intensity (abs(u2*exp(i*0.5*k*chi0*s0+i*k*(deltath*sin(2*thetab)+chi0/2)*sh))^2/width)
    scan_arcsec | abs(u2*exp(i*0.5*k*chi0*s0+i*k*(deltath*sin(2*thetab)+chi0/2)*sh))^2/width (1) | abs(u1*exp(i*0.5*k*chi0*s0+i*k*(deltath*sin(2*thetab)+chi0/2)*sh))^2/width (1)
    -5 | 0.0218097 | 0.22712
    -4.13793 | 0.0232499 | 0.232531
    -3.27586 | 0.0259111 | 0.237122
    -2.41379 | 0.0252052 | 0.24091
    -1.55172 | 0.0251492 | 0.243938
    -0.689655 | 0.0478131 | 0.246272
    0.172414 | 0.113031 | 0.247996
    1.03448 | 0.0656696 | 0.249204
    1.89655 | 0.0453968 | 0.249996
    2.75862 | 0.121125 | 0.250471
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
Plots
  pg1: PlotGroup2D "Incident wave" | data = dset3
    surf1: Surface | data = dset3; expr = abs(u1*exp(i*0.5*k*chi0*s0+i*k*(deltath*sin(2*thetab)+chi0/2)*sh))^2
  pg2: PlotGroup2D "Diffracted wave" | data = dset4
    surf1: Surface | expr = abs(u2*exp(i*0.5*k*chi0*s0+i*k*(deltath*sin(2*thetab)+chi0/2)*sh))^2
    mesh1: Mesh (disabled)
  pg6: PlotGroup1D "Wave Phases at the Surface" | data = edg1
    lngr1: LineGraph "Incident Wave" | expr = arg(u1)
    lngr2: LineGraph "Diffracted Wave" | expr = arg(u2)
  pg13: PlotGroup1D "Incident phase" | data = edg1
    lngr1: LineGraph | data = edg1; expr = arg(u1)
  pg14: PlotGroup2D "Incident wave 1" | data = dset3
    surf1: Surface | data = dset3; expr = abs(u1)^2
  pg16: PlotGroup1D "Wave intensities at the surface" | data = edg1
    lngr1: LineGraph (disabled) | expr = abs(u1*exp(i*0.5*k*chi0*s0+i*k*(deltath*sin(2*thetab)+chi0/2)*sh))^2
    lngr2: LineGraph | expr = abs(u2*exp(i*0.5*k*chi0*s0+i*k*(deltath*sin(2*thetab)+chi0/2)*sh))^2
  pg17: PlotGroup1D "1D Plot Group 17" | data = none
    tblp1: Table "Table Graph 1" | table = tbl1
  pg18: PlotGroup2D "Total intensity" | data = dset4
    surf1: Surface
      expr = (abs(u1)+abs(u2)^2)*abs(exp(i*0.5*k*chi0*s0+i*k*(deltath*sin(2*thetab)+chi0/2)*sh))^2
      unit = 1

Exports
  data1: Data "Incident"
    data = edg1
    expr = u1
    filename = /home/aripekka/Dropbox/Work/Comsol_TT_solver/incident_wave.dat
  data2: Data "Diffracted"
    data = edg1
    expr = {u2, u1, nx}
    unit = {1, 1, }
    descr = {Dependent variable u2, Dependent variable u1, "Normal, x component"}
    filename = /home/aripekka/Dropbox/Work/Comsol_TT_solver/reflected_wave.dat
    struct = sectionwise
  data3: Data "Python FK"
    data = edg1
    expr = {theta, k, u1*exp(i*0.5*k*chi0*s0+i*k*(deltath*sin(2*thetab)+chi0/2)*sh), u2*exp(i*0.5*k*chi0*s0+i*k*(deltath*sin(2*thetab)+chi0/2)*sh), nx, ny, ux, uz, G, scan_arcsec}
    unit = {rad, 1/um, 1, 1, , , µm, µm, 1/um, }
    descr = {Angle of diffraction, Wavenumber of incident radiation, Incident wave, Diffracted wave, "Normal, x component", "Normal, y component", Displacement x component, displacement z component, Reciprocal lattice vector length, }
    filename = /homeappl/home/aphonkan/esrf_takagitaupin_comsol/new_form_simu/bent/pythonfk_onrowland_5arcsec.dat