// COMSOL Multiphysics 5.3.0.260 model "si111_6keV_0.75um_grid_source_onrowland_github.mph"
// New formulation
// Outline of the model tree

Parameters
  width = 500[um]  // Width of the integration area
  height = 50[µm]  // Height of the integration area
  theta = thetab+scan  // Angle of incidence
  hc = 1.23984193 [eV*µm]
  E0 = 6[keV]  // Energy of an incident photon
  lambda = hc/E0  // Wavelength of radiation
  k = 2*pi/lambda  // Wavenumber of incident radiation
  chi0 = -0.274564e-4+i*0.109657e-5
  chih = -0.109980e-4-i*0.991441e-5
  chib = -0.991441e-5+i*0.109979e-4
  d100 = 5.4307E-10 [m]  // Silicon lattice parameter
  dhkl = d100/sqrt(1^2+1^2+1^2)
  thetab = asin(lambda/(2*dhkl))  // Bragg angle
  scan_arcsec = 1000
  G = 2*pi/dhkl  // Reciprocal lattice vector length
  FWHM = 2*sqrt(abs(chih*chib))/sin(2*thetab)*180/pi*3600  // Darwin width in arcsec
  FWHM_max = sqrt(2*sqrt(abs(chih*chib)))*180/pi*3600  // Darwin width near backscattering
  thb_deg = thetab*180/pi
  Lambda_B = lambda*sin(thetab)/(pi*sqrt(abs(chih*chib)))  // Extinction length (Bragg)
  a_0 = lambda/(2*pi*abs(imag(chi0)))  // Absorption length
  scan = (scan_arcsec/3600)[deg]
  FWHM_window = 100[um]
  window_sigma = FWHM_window/2.355

Variables
  var1 "TT-variables"
    COS = cos(theta)
    SIN = sin(theta)
    deltath = theta-thetab
    beta = k*deltath*sin(2*thetab)
    dGu_dsg = G*(COS*duz_dx+SIN*duz_dz)
    s0 = (x*SIN-y*COS)/(2*COS*SIN)
    sh = (x*SIN+y*COS)/(2*COS*SIN)
    A1 = i*0.5*k*chi0
    A2 = i*0.5*k*chib
    B1 = i*0.5*k*chih
    B2 = i*0.5*k*chi0+i*dGu_dsg
  var2 "Deformation"
    ux = ux_cylindrical
    uz = uz_cylindrical
    ux_cylindrical = -X*(Y+height/2)*invR
    uz_cylindrical = (X^2+nu*(Y+height/2)^2)/2*invR
    duz_dx = X*invR
    duz_dz = nu*(Y+height/2)*invR
    R = 5[m]  // Bending radius
    nu = 0.27  // Poisson's ratio
    invR = 1/R  // Inverse of R (set to 0 for non-bent crystal)
  var3 "Source"
    source = s_cyl*gaussian_window
    s_plane = exp(-i*beta*sh)
    eta = x*SIN+y*COS
    source_dist = R*SIN  // Distance to the source on the Rowland circle
    s_cyl = exp(i*k*eta^2/(2*source_dist)-i*beta*sh)
    gaussian_window = exp(-(x+0[um])^2/(2*window_sigma^2))

Couplings
  intop1: Integration on boundaries 3

Geometry
  geom1 "Geometry 1" (2D, length unit µm)
    r1: Rectangle | pos = {-width/2+150[um], -height}; size = {width, height}
    fin: Finalize "Form Union"

Physics
  ale: MovingMesh on all domains
    fix1: FixedMesh (default)
    disp1: PrescribedMeshDisplacement (default) | useDx = {0, 0}
    pres1: PrescribedDeformation on domains 1 | dx = {ux, uz}
  w: WeakFormPDE on all domains
    dependent variable u = {u1, u2}
    ShapeProperty.order = 2
    wfeq1: WeakFormPDE "Weak form TT-equations" (default)
      weak = {(test(u1x)*COS-test(u1y)*SIN)*u1+(A1*u1+A2*u2)*test(u1), (test(u2x)*COS+test(u2y)*SIN)*u2+(B1*u1+B2*u2)*test(u2)}
    zflx1: ZeroFluxBoundary "Zero Flux 1" (default)
    init1: init "Initial Values 1" (default) | u1 = source
    weak10: WeakContribution on boundaries 1-4
      integrationOrder = 4
      quadratureFrame = spatial
      weakExpression = - test(u2)*u2*(COS*nx+SIN*ny)
      automaticQuadrature = 1
    weak9: WeakContribution on all boundaries
      integrationOrder = 4
      quadratureFrame = spatial
      weakExpression = - test(u1)*u1*(COS*nx-SIN*ny)
      automaticQuadrature = 1
    dir2: DirichletBoundary "Diffracted Wave at the Bottom" on boundaries 2 | r = {0, 0}; useDirichletCondition = {0, 1}
    dir1: DirichletBoundary "Incident Wave at the Top" on boundaries 3 | r = {source, 0}; useDirichletCondition = {1, 0}
    dir3: DirichletBoundary "Waves at the Left" on boundaries 1 | r = {0, 0}

Mesh
  mesh1 "Mesh 1"
    size: MeshSizeDefault | hmax = 0.75; hmin = 0.0010; hauto = 1; custom = on
    ftri1: FreeTri "Free Triangular 1" on remaining entities
    dis2: Distribution (disabled) on boundaries 2, 3 | type = explicit
    map1: Map "Mapped 1" (disabled) on remaining entities | adjustedgdistr = on
    bl1: BndLayer "Boundary Layers 1" (disabled) on entire geometry
      blp: BndLayerProp "Boundary Layer Properties" on boundaries 3
        blnlayers = 10
        blstretch = 1
        inittype = blhmin
        blhmin = 0.20

Studies
  std2 "Compute rocking curve"
    param: Parametric "Parametric Sweep" | pname = scan_arcsec; plistarr = range(-10,40/99,30)
    stat: Stationary | physselection = w

Solver configurations
  sol3 "Solver 3" (study std2)
    v1: Variables "Dependent Variables 1"
    s1: Stationary "Stationary Solver 1"
      dDef: Direct | ooc = on; oocmemory = 2048
      fc1: FullyCoupled | linsolver = dDef
  sol4 "Parametric 4" (study std2)

Datasets
  edg1: Edge2D "Top Surface" on boundaries 3 | data = dset4
  dset3: Solution | solution = sol3
  dset4: Solution | solution = sol4

Derived values
  int2: IntLine "Integrated intensity on surface" on boundaries 3
    data = dset4
    table = tbl2
    expr = {abs(u1*exp(i*beta*sh))^2/width, abs(u2*exp(i*beta*sh-i*G*uz))^2/width}
    unit = {1, 1}
    descr = {Incident intensity, Reflected intensity}

Tables
  tbl1: Table
    // Integrated intensity on surface (abs(u1*exp(i*beta*sh))^2/width, abs(u2*exp(i*beta*sh-i*G*uz))^2/width)
    scan_arcsec | Incident intensity (1) | Reflected intensity (1)
    -10 | 0.150455 | 0.00242557
    -5.55556 | 0.15046 | 0.00437882
    -1.11111 | 0.150461 | 0.00999557
    3.33333 | 0.150461 | 0.0712066
    7.77778 | 0.150458 | 0.133328
    12.2222 | 0.150448 | 0.110791
    16.6667 | 0.150417 | 0.0194696
    21.1111 | 0.150352 | 0.00659338
    25.5556 | 0.150231 | 0.00335253
    30 | 0.150032 | 0.00183946
  tbl2: Table
    // Integrated intensity on surface (abs(u1*exp(i*beta*sh))^2/width, abs(u2*exp(i*beta*sh-i*G*uz))^2/width)
    scan_arcsec | Incident intensity (1) | Reflected intensity (1)
    -10 | 0.150455 | 0.00242557
    -9.59596 | 0.150456 | 0.0025437
    -9.19192 | 0.150456 | 0.00267021
    -8.78788 | 0.150457 | 0.00280572
    -8.38384 | 0.150458 | 0.0029515
    -7.9798 | 0.150458 | 0.00310931
    -7.57576 | 0.150459 | 0.00328018
    -7.17172 | 0.150459 | 0.00346515
    -6.76768 | 0.150459 | 0.00366558
    -6.36364 | 0.15046 | 0.0038826
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
Plots
  pg1: PlotGroup2D "Incident wave" | data = dset4
    surf1: Surface | data = dset4; expr = abs(u1*exp(i*beta*sh))^2
  pg2: PlotGroup2D "Diffracted wave" | data = dset4
    surf1: Surface | data = dset4; expr = abs(u2*exp(i*beta*sh-i*G*uz))^2
    mesh1: Mesh (disabled)
  pg6: PlotGroup1D "Wave Phases at the Surface" | data = edg1
    lngr1: LineGraph "Incident Wave" | expr = arg(u1*exp(i*beta*sh))
    lngr2: LineGraph "Diffracted Wave" | expr = arg(u2*exp(i*beta*sh-i*G*uz))
  pg16: PlotGroup1D "Wave intensities at the surface" | data = edg1
    lngr1: LineGraph | expr = abs(u1*exp(i*beta*sh))^2
    lngr2: LineGraph | expr = abs(u2*exp(i*beta*sh-i*G*uz))^2
  pg18: PlotGroup2D "Total intensity" | data = dset4
    surf1: Surface | expr = abs(u1)^2+abs(u2)^2; unit = 1

Exports
  data1: Data "Waves on surface"
    data = edg1
    expr = {real(u1*exp(i*beta*sh)), imag(u1*exp(i*beta*sh)), real(u2*exp(i*beta*sh-i*G*uz)), imag(u2*exp(i*beta*sh-i*G*uz))}
    filename = /homeappl/home/aphonkan/tt_comsol_simulations/gamma_version/bent/5m_bending_radius/focusing/bent_onrowland_2.9293_arcsec.dat